// Integration Capacity Analysis (ICA) GridLAB-D auxiliary model file

// convert CSV configuration file, if any
#ifexist "anticipation_config.csv"
#exec strings <anticipation_config.csv | awk 'BEGIN {FS=","} {print "#define",$1 "=" $2}' >ica_config.glm
#endif

// load configuration file, if any
#ifexist "anticipation_config.glm"
#include "anticipation_config.glm"
#endif

// load the gridlabd-python module
module anticipation;
